from tracemalloc import start
from turtle import pos
from cairo import Surface
import Sofa
import SofaRuntime
import numpy as np
import os
from Sofa import SofaDeformable
from time import process_time, time
import datetime
from parameters_2D import p_grid, p_grid_LR
# add network path to the python path
import sys
sys.path.append(os.path.join(os.path.dirname(__file__), '../network'))

from network.FC_Error_estimation import Trainer
from sklearn.preprocessing import MinMaxScaler
from scipy.interpolate import RBFInterpolator, griddata


import SofaCaribou
SofaRuntime.PluginRepository.addFirstPath(os.environ['CARIBOU_ROOT'])

class AnimationStepController(Sofa.Core.Controller):
    def __init__(self, node, *args, **kwargs):
        Sofa.Core.Controller.__init__(self, *args, **kwargs)
        self.externalForce = [0, -10, 0]
        self.createGraph(node)
        self.root = node
        self.save = False
        self.save_for_images = False
        self.l2_error, self.MSE_error = [], []
        self.l2_deformation, self.MSE_deformation = [], []
        self.RMSE_error, self.RMSE_deformation = [], []
        self.RRMSE_error, self.RRMSE_deformation = [], []
        self.network = Trainer('npy_gmsh/2024-08-09_11:36:13_symmetric/train', 32, 0.001, 500)
        # self.network.load_model('models/model_2024-05-22_10:25:12.pth') # efficient
        # self.network.load_model('models/model_2024-05-21_14:58:44.pth') # not efficient
        self.network.load_model('models/model_2024-08-09_14:45:34_symmetric.pth') # efficient noisy

    def createGraph(self, rootNode):

        rootNode.addObject('RequiredPlugin', name='MultiThreading')
        rootNode.addObject('RequiredPlugin', name='SofaCaribou')
        rootNode.addObject('RequiredPlugin', name='Sofa.Component.Constraint.Projective') # Needed to use components [FixedProjectiveConstraint]
        rootNode.addObject('RequiredPlugin', name='Sofa.Component.Engine.Select') # Needed to use components [BoxROI]
        rootNode.addObject('RequiredPlugin', name='Sofa.Component.LinearSolver.Iterative') # Needed to use components [CGLinearSolver]
        rootNode.addObject('RequiredPlugin', name='Sofa.Component.LinearSolver.Direct')
        rootNode.addObject('RequiredPlugin', name='Sofa.Component.Mass')
        rootNode.addObject('RequiredPlugin', name='Sofa.Component.Mapping.Linear') # Needed to use components [BarycentricMapping]
        rootNode.addObject('RequiredPlugin', name='Sofa.Component.MechanicalLoad') # Needed to use components [ConstantForceField]
        rootNode.addObject('RequiredPlugin', name='Sofa.Component.ODESolver.Backward') # Needed to use components [StaticSolver]
        rootNode.addObject('RequiredPlugin', name='Sofa.Component.SolidMechanics.FEM.Elastic') # Needed to use components [TriangularFEMForceFieldOptim]
        rootNode.addObject('RequiredPlugin', name='Sofa.Component.StateContainer') # Needed to use components [MechanicalObject]
        rootNode.addObject('RequiredPlugin', name='Sofa.Component.Topology.Container.Dynamic') # Needed to use components [TriangleSetTopologyContainer]
        rootNode.addObject('RequiredPlugin', name='Sofa.Component.Topology.Container.Grid') # Needed to use components [RegularGridTopology]
        rootNode.addObject('RequiredPlugin', name='Sofa.Component.Visual') # Needed to use components [VisualStyle]

        rootNode.addObject('DefaultAnimationLoop')
        rootNode.addObject('DefaultVisualManagerLoop')
        rootNode.addObject('VisualStyle', name="visualStyle", displayFlags="showBehaviorModels showCollisionModels")

        sphereRadius=0.025


        self.exactSolution = rootNode.addChild('HighResSolution2D', activated=True)
        self.exactSolution.addObject('MeshGmshLoader', name='grid', filename='mesh/rectangle_1166.msh')
        self.surface_topo = self.exactSolution.addObject('TriangleSetTopologyContainer', name='triangleTopo', src='@grid')
        self.MO1 = self.exactSolution.addObject('MechanicalObject', name='DOFs', template='Vec3d', src='@grid')
        # self.exactSolution.addObject('MeshMatrixMass', totalMass=10, name="SparseMass", topology="@quadTopo")
        self.exactSolution.addObject('StaticSolver', name='ODE', newton_iterations="20", printLog=True)
        self.exactSolution.addObject('CGLinearSolver', iterations=1000, name="linear solver", tolerance="1.0e-6", threshold="1.0e-6")
        self.exactSolution.addObject('TriangularFEMForceField', name="FEM", youngModulus=5000, poissonRatio=0.4, method="large")
        self.exactSolution.addObject('BoxROI', name='ROI', box='-0.1 -1.1 -0.1 0.1 1.1 0.1')
        self.cff2 = self.exactSolution.addObject('ConstantForceField', indices="@ROI.indices", totalForce=self.externalForce, showArrowSize=0.1, showColor="0.2 0.2 0.8 1")
        self.cff_box = self.exactSolution.addObject('BoxROI', name='ROI2', box="9.9 -1.1 -0.1 10.1 1.1 0.1")
        self.cff = self.exactSolution.addObject('ConstantForceField', indices="@ROI2.indices", totalForce=self.externalForce, showArrowSize=0.1, showColor="0.2 0.2 0.8 1")
        self.exactSolution.addObject('BoxROI', name='ROI3', box="4.9 -1.1 -0.1 5.1 1.1 0.1")
        self.exactSolution.addObject('FixedConstraint', indices = '@ROI3.indices')
        self.coarse = self.exactSolution.addChild('CoarseMesh')
        self.coarse.addObject('RegularGridTopology', name='coarseGrid', min=p_grid_LR.min, max=p_grid_LR.max, nx=p_grid_LR.res[0], ny=p_grid_LR.res[1], nz=p_grid_LR.res[2])
        self.coarse.addObject('TriangleSetTopologyContainer', name='triangleTopo', src='@coarseGrid')
        self.MO1_LR = self.coarse.addObject('MechanicalObject', name='coarseDOFs', template='Vec3d', src='@coarseGrid')
        self.coarse.addObject('SphereCollisionModel', radius=sphereRadius, group=1, color='0 1 0')
        self.coarse.addObject('BarycentricMapping', name="mapping", input='@../DOFs', input_topology='@../triangleTopo', output='@coarseDOFs', output_topology='@triangleTopo')


        self.exactSolution.addChild("visual")
        self.exactSolution.visual.addObject('OglModel', src='@../grid', color='0 1 1 0.5')
        self.exactSolution.visual.addObject('IdentityMapping', input='@../DOFs', output='@./')

        # same object with different resolution

        self.LowResSolution = rootNode.addChild('LowResSolution2D', activated=True)
        self.LowResSolution.addObject('MeshGmshLoader', name='grid', filename='mesh/rectangle_75.msh')
        self.surface_topo_LR = self.LowResSolution.addObject('TriangleSetTopologyContainer', name='quadTopo', src='@grid')
        self.MO2 = self.LowResSolution.addObject('MechanicalObject', name='DOFs', template='Vec3d', src='@grid')
        # self.LowResSolution.addObject('MeshMatrixMass', totalMass=10, name="SparseMass", topology="@quadTopo")
        self.LowResSolution.addObject('StaticSolver', name='ODE', newton_iterations="20", printLog=True)
        self.LowResSolution.addObject('CGLinearSolver', iterations=500, name="linear solver", tolerance="1.0e-6", threshold="1.0e-6")
        self.LowResSolution.addObject('TriangularFEMForceField', name="FEM", youngModulus=5000, poissonRatio=0.4, method="large")
        self.cff_box2_LR = self.LowResSolution.addObject('BoxROI', name='ROI', box='-0.1 -1.1 -0.1 0.1 1.1 0.1')
        self.cff2LR = self.LowResSolution.addObject('ConstantForceField', indices="@ROI2.indices", totalForce=self.externalForce, showArrowSize=0.1, showColor="0.2 0.2 0.8 1")
        self.cff_box_LR = self.LowResSolution.addObject('BoxROI', name='ROI2', box="9.9 -1.1 -0.1 10.1 1.1 0.1")
        self.cffLR = self.LowResSolution.addObject('ConstantForceField', indices="@ROI2.indices", totalForce=self.externalForce, showArrowSize=0.1, showColor="0.2 0.2 0.8 1")
        self.LowResSolution.addObject('BoxROI', name='ROI3', box="4.9 -1.1 -0.1 5.1 1.1 0.1")
        self.LowResSolution.addObject('FixedConstraint', indices='@ROI3.indices')

        self.trained_nodes = self.LowResSolution.addChild('CoarseMesh')
        self.trained_nodes.addObject('RegularGridTopology', name='coarseGrid', min=p_grid_LR.min, max=p_grid_LR.max, nx=p_grid_LR.res[0], ny=p_grid_LR.res[1], nz=p_grid_LR.res[2])
        self.trained_nodes.addObject('TriangleSetTopologyContainer', name='triangleTopo', src='@coarseGrid')
        self.MO_training = self.trained_nodes.addObject('MechanicalObject', name='coarseDOFs', template='Vec3d', src='@coarseGrid')
        self.trained_nodes.addObject('SphereCollisionModel', radius=sphereRadius, group=1, color='0 1 0')
        self.trained_nodes.addObject('BarycentricMapping', name="mapping", input='@../DOFs', input_topology='@../triangleTopo', output='@coarseDOFs', output_topology='@triangleTopo')

        self.LowResSolution.addChild("visual")
        self.visual_model = self.LowResSolution.visual.addObject('OglModel', src='@../grid', color='1 0 0 0.2')
        self.LowResSolution.visual.addObject('IdentityMapping', input='@../DOFs', output='@./')

        self.nb_nodes = len(self.MO1.position.value)
        self.nb_nodes_LR = len(self.MO1_LR.position.value)

        self.nb_nodes = len(self.MO1.position.value)
        self.nb_nodes_LR = len(self.MO1_LR.position.value)

        self.high_res_shape = np.array((p_grid.nb_nodes, 3))
        self.low_res_shape = np.array((p_grid_LR.nb_nodes, 3))

    def onSimulationInitDoneEvent(self, event):
        """
        Called within the Sofa pipeline at the end of the scene graph initialisation.
        """
        self.inputs = []
        self.outputs = []
        self.save = False
        self.efficient_sampling = False
        if self.efficient_sampling:
            self.count_v = 0
            self.num_versors = 5
            self.versors = self.generate_versors(self.num_versors)
            self.magnitudes = np.linspace(0, 40, 30)
            self.count_m = 0
            self.angles = np.linspace(0, 2*np.pi, self.num_versors, endpoint=False)
            self.starting_points = np.linspace(self.angles[0], self.angles[1], len(self.magnitudes), endpoint=False)
        if self.save:
            if not os.path.exists('npy_gmsh'):
                os.mkdir('npy_gmsh')
            # get current time from computer format yyyy-mm-dd-hh-mm-ss and create a folder with that name
            self.directory = datetime.datetime.now().strftime('%Y-%m-%d_%H:%M:%S')
            self.directory = self.directory + "_symmetric"
            if self.efficient_sampling:
                self.directory = self.directory + "_efficient"
            os.makedirs(f'npy_gmsh/{self.directory}')
            print(f"Saving data to npy_gmsh/{self.directory}")
        self.sampled = False

        surface = self.surface_topo
        surface_LR = self.surface_topo_LR

        self.idx_surface = surface.triangles.value.reshape(-1)
        self.idx_surface_LR = surface_LR.triangles.value.reshape(-1)


    def onAnimateBeginEvent(self, event):

        self.bad_sample = False
        # reset positions
        self.MO1.position.value = self.MO1.rest_position.value
        self.MO2.position.value = self.MO2.rest_position.value
        if self.sampled:
            print("================== Sampled all magnitudes and versors ==================\n")
            print ("================== The simulation is over ==================\n")

        if not self.efficient_sampling:
            self.theta = np.random.uniform(0, 2*np.pi)
            self.versor_right = np.array([np.cos(self.theta), np.sin(self.theta)])
            self.versor_left = np.array([-np.cos(self.theta), np.sin(self.theta)])
            self.magnitude = np.random.uniform(0, 200)
            self.externalForce_right = np.append(self.magnitude * self.versor_right, 0)
            self.externalForce_left = np.append(self.magnitude * self.versor_left, 0)
        else:
            self.sample = self.count_m *self.num_versors + self.count_v
            self.externalForce = np.append(self.magnitudes[self.count_m] * self.versors[self.count_v], 0)

            self.count_v += 1
            if self.count_v == len(self.versors):
                self.count_v = 0
                self.count_m += 1
                self.versors = self.generate_versors(self.num_versors, starting_point=self.starting_points[self.count_m])
            if self.count_m == len(self.magnitudes):
                self.count_m = 0
                self.count_v = 0
                self.sampled = True


        self.exactSolution.removeObject(self.cff2)
        self.exactSolution.removeObject(self.cff)
        self.LowResSolution.removeObject(self.cff2LR)
        self.LowResSolution.removeObject(self.cffLR)

        self.cff2 = self.exactSolution.addObject('ConstantForceField', indices="@ROI.indices", totalForce=self.externalForce_left, showArrowSize=0.1, showColor="0.2 0.2 0.8 1")
        self.cff = self.exactSolution.addObject('ConstantForceField', indices="@ROI2.indices", totalForce=self.externalForce_right, showArrowSize=0.1, showColor="0.2 0.2 0.8 1")
        self.cff2LR = self.LowResSolution.addObject('ConstantForceField', indices="@ROI.indices", totalForce=self.externalForce_left, showArrowSize=0.1, showColor="0.2 0.2 0.8 1")
        self.cffLR = self.LowResSolution.addObject('ConstantForceField', indices="@ROI2.indices", totalForce=self.externalForce_right, showArrowSize=0.1, showColor="0.2 0.2 0.8 1")
        self.cff.init()
        self.cff2.init()
        self.cffLR.init()
        self.cff2LR.init()

        self.start_time = process_time()


    def onAnimateEndEvent(self, event):
        coarse_pos = self.MO_training.position.value.copy() - self.MO_training.rest_position.value.copy()

        #print("Coarse position: ", coarse_pos.shape)
        # cut the z component
        # coarse_pos = coarse_pos[:, :2]
        # print("Coarse position shape: ", coarse_pos.shape)
        inputs = np.reshape(coarse_pos, -1)
        if self.network.normalized:
            scaler = MinMaxScaler()
            inputs = scaler.fit_transform(inputs)

        # self.noises = [0.0001, 0.0005, 0.001, 0.005, 0.01, 0.05]
        # self.errs = []
        # for i in self.noises:
        #     print(f"Adding noise: {i}")
        #     self.MO_training.position.value = coarse_pos + self.MO_training.rest_position.value
        #     # add noise to the input
        #     noise = np.random.normal(0, i, inputs.shape)
        #     noisy_inputs = inputs + noise


        U = self.network.predict(inputs).cpu().numpy()
        if self.network.normalized:
            U = scaler.inverse_transform(U)
        # print("Predicted displacement: ", U.shape)
        # print("Low res shape: ", self.low_res_shape)
        # reshape U to have the same shape as the position
        # add the z component


        U = np.reshape(U, (self.low_res_shape[0], self.low_res_shape[1]))
        # U = np.append(U, np.zeros((self.high_res_shape[0], 1)), axis=1)
        # print("U shape after reshape: ", U)
        # compute L2 norm of the prediction error

        # print("Predicted displacement first 5 nodes: ", U[:5])
        # print("Exact displacement first 5 nodes: ", self.MO1.position.value[:5] - self.MO1.rest_position.value[:5])


        self.MO_training.position.value = self.MO_training.position.value + U


        positions = self.MO_training.rest_position.value.copy()[:, :2]
        #print("Positions: ", positions)
        #print("Rest position shape: ", self.MO_training.position.value)
        displacement = self.MO_training.position.value.copy() - self.MO_training.rest_position.value.copy()
        displacement = displacement[:, :2]
        #print("Displacement: ", displacement)

        interpolator = RBFInterpolator(positions, displacement, neighbors=10, kernel="thin_plate_spline")
        interpolate_positions = self.MO2.rest_position.value.copy()
        interpolate_positions_2D = self.MO2.rest_position.value.copy()[:, :2]
        corrected_displacement = interpolator(interpolate_positions_2D)

        #print("Corrected displacement: ", corrected_displacement)
        #print("Before correction: ", self.MO2.position.value)
        corrected_displacement = np.append(corrected_displacement, np.zeros((interpolate_positions.shape[0], 1)), axis=1)
        self.MO2.position.value = interpolate_positions + corrected_displacement

        self.visual_model.position.value = interpolate_positions + corrected_displacement

        if self.save_for_images:
            if not os.path.exists('images_data'):
                os.mkdir('images_data')

            if not os.path.exists(f'images_data/{self.directory}'):
                os.mkdir(f'images_data/{self.directory}')

            ground_truth_displacement = self.MO1.position.value - self.MO1.rest_position.value
            prediction_displacement = self.MO2.position.value - self.MO2.rest_position.value

            ground_truth_grid = self.MO1_LR.position.value - self.MO1_LR.rest_position.value
            prediction_grid = self.MO_training.position.value - self.MO_training.rest_position.value

            ground_truth_rest = self.MO1.rest_position.value
            prediction_rest = self.MO2.rest_position.value

            ground_truth_grid_rest = self.MO1_LR.rest_position.value
            prediction_grid_rest = self.MO_training.rest_position.value

            np.save(f'images_data/{self.directory}/ground_truth_displacement.npy', ground_truth_displacement)
            np.save(f'images_data/{self.directory}/prediction_displacement.npy', prediction_displacement)
            np.save(f'images_data/{self.directory}/ground_truth_grid.npy', ground_truth_grid)
            np.save(f'images_data/{self.directory}/prediction_grid.npy', prediction_grid)
            np.save(f'images_data/{self.directory}/ground_truth_rest.npy', ground_truth_rest)
            np.save(f'images_data/{self.directory}/prediction_rest.npy', prediction_rest)
            np.save(f'images_data/{self.directory}/ground_truth_grid_rest.npy', ground_truth_grid_rest)
            np.save(f'images_data/{self.directory}/prediction_grid_rest.npy', prediction_grid_rest)


        self.end_time = process_time()
        # error = np.linalg.norm(self.MO_NN.position.value - self.MO1.position.value)
        # print(f"Prediction error: {error}")
        if not self.bad_sample:
            self.compute_metrics()
        print("Computation time for 1 time step: ", self.end_time - self.start_time)
        print("External force: ", np.linalg.norm(self.externalForce))
        print("L2 error: ", self.l2_error[-1])
        print("L2 deformation: ", self.l2_deformation[-1])
        print("Relative error: ", self.l2_error[-1]/np.linalg.norm(self.MO_training.position.value - self.MO_training.rest_position.value))


    def compute_metrics(self):
        """
        Compute L2 error and MSE for each sample.
        """

        pred = self.MO_training.position.value - self.MO_training.rest_position.value
        gt = self.MO1_LR.position.value - self.MO1_LR.rest_position.value

        # Compute metrics only for non-zero displacements
        error = (gt - pred).reshape(-1)
        self.l2_error.append(np.linalg.norm(error))
        self.MSE_error.append((error.T @ error) / error.shape[0])
        self.l2_deformation.append(np.linalg.norm(gt))
        self.MSE_deformation.append((gt.reshape(-1).T @ gt.reshape(-1)) / gt.shape[0])

        self.RMSE_error.append(np.sqrt((error.T @ error) / error.shape[0]))
        self.RMSE_deformation.append(np.sqrt((gt.reshape(-1).T @ gt.reshape(-1)) / gt.shape[0] ))

        #ADD Relative RMSE
        self.RRMSE_error.append(np.sqrt(((error.T @ error) / error.shape[0]) / ((gt.reshape(-1).T @ gt.reshape(-1)))))


    def compute_displacement(self, mechanical_object):
        # Compute the displacement between the high and low resolution solutions
        U = mechanical_object.position.value.copy() - mechanical_object.rest_position.value.copy()
        return U

    def compute_rest_position(self, mechanical_object):
        # Compute the position of the high resolution solution
        return mechanical_object.rest_position.value.copy()

    def generate_versors(self, n=30, starting_point=0):
        """
        Generate evenly distributed versor on the unit circle.
        Change the starting point at every new magnitude
        """
        angles = np.linspace(0, 2*np.pi, n, endpoint=False) + starting_point
        versors = np.array([np.cos(angles), np.sin(angles)]).T
        return versors
    def close(self):

        if len(self.l2_error) > 0:
            print("\nL2 ERROR Statistics :")
            print(f"\t- Distribution : {np.round(np.mean(self.l2_error), 6)} ± {np.round(np.std(self.l2_error), 6)} m")
            print(f"\t- Extrema : {np.round(np.min(self.l2_error), 6)} -> {np.round(np.max(self.l2_error), 6)} m")
            relative_error = np.array(self.l2_error) / np.array(self.l2_deformation)
            print(f"\t- Relative Distribution : {np.round(1e2 * relative_error.mean(), 6)} ± {np.round(1e2 * relative_error.std(), 6)} %")
            print(f"\t- Relative Extrema : {np.round(1e2 * relative_error.min(), 6)} -> {np.round(1e2 * relative_error.max(), 6)} %")

            print("\nMSE Statistics :")
            print(f"\t- Distribution : {np.round(np.mean(self.MSE_error), 6)} ± {np.round(np.std(self.MSE_error), 6)} m²")
            print(f"\t- Extrema : {np.round(np.min(self.MSE_error), 6)} -> {np.round(np.max(self.MSE_error), 6)} m²")
            relative_error = np.array(self.MSE_error) / np.array(self.MSE_deformation)
            print(f"\t- Relative Distribution : {np.round(1e2 * relative_error.mean(), 6)} ± {np.round(1e2 * relative_error.std(), 6)} %")
            print(f"\t- Relative Extrema : {np.round(1e2 * relative_error.min(), 6)} -> {np.round(1e2 * relative_error.max(), 6)} %")

            print("\nRMSE Statistics :")
            print(f"\t- Distribution : {np.round(np.mean(self.RMSE_error), 6)} ± {np.round(np.std(self.RMSE_error), 6)} m")
            print(f"\t- Extrema : {np.round(np.min(self.RMSE_error), 6)} -> {np.round(np.max(self.RMSE_error), 6)} m")
            relative_error = np.array(self.RMSE_error) / np.array(self.RMSE_deformation)
            print(f"\t- Relative Distribution : {np.round(1e2 * relative_error.mean(), 6)} ± {np.round(1e2 * relative_error.std(), 6)} %")
            print(f"\t- Relative Extrema : {np.round(1e2 * relative_error.min(), 6)} -> {np.round(1e2 * relative_error.max(), 6)} %")

            print("\nRRMSE Statistics :")
            print(f"\t- Distribution : {np.round(np.mean(self.RRMSE_error), 6)} ± {np.round(np.std(self.RRMSE_error), 6)} m")
            print(f"\t- Extrema : {np.round(np.min(self.RRMSE_error), 6)} -> {np.round(np.max(self.RRMSE_error), 6)} m")

        elif len(self.errs) > 0:
            # plot the error as a function of the noise
            import matplotlib.pyplot as plt
            plt.semilogx(self.noises, self.errs)
            plt.xlabel('Noise')
            plt.ylabel('Error')
            plt.title('Error as a function of the noise')
            plt.show()
        else:
            print("No data to compute metrics.")


def createScene(rootNode, *args, **kwargs):
    rootNode.dt = 0.01
    rootNode.gravity = [0, 0, 0]
    rootNode.name = 'root'
    asc = AnimationStepController(rootNode, *args, **kwargs)
    rootNode.addObject(asc)
    return rootNode, asc


def main():
    import Sofa.Gui
    SofaRuntime.importPlugin("Sofa.GL.Component.Rendering3D")
    SofaRuntime.importPlugin("Sofa.GL.Component.Shader")
    SofaRuntime.importPlugin("Sofa.Component.StateContainer")
    SofaRuntime.importPlugin("Sofa.Component.ODESolver.Backward")
    SofaRuntime.importPlugin("Sofa.Component.LinearSolver.Direct")
    SofaRuntime.importPlugin("Sofa.Component.IO.Mesh")
    SofaRuntime.importPlugin("Sofa.Component.MechanicalLoad")
    SofaRuntime.importPlugin("Sofa.Component.Engine.Select")
    SofaRuntime.importPlugin("Sofa.Component.SolidMechanics.FEM.Elastic")

    root=Sofa.Core.Node("root")
    asc = createScene(root)[1]
    Sofa.Simulation.init(root)

    Sofa.Gui.GUIManager.Init("myscene", "qglviewer")
    Sofa.Gui.GUIManager.createGUI(root, __file__)
    Sofa.Gui.GUIManager.SetDimension(800, 600)
    Sofa.Gui.GUIManager.MainLoop(root)
    Sofa.Gui.GUIManager.closeGUI()
    asc.close()


if __name__ == '__main__':
    main()
