import Sofa
import SofaRuntime
import numpy as np
import os
from Sofa import SofaDeformable
import json
from time import process_time, time
import datetime
from sklearn.preprocessing import MinMaxScaler
# add network path to the python path
import sys
sys.path.append(os.path.join(os.path.dirname(__file__), '../network'))

from tqdm import tqdm


from parameters_2D_zigzag import p_grid, p_grid_LR


########################################
# MUST FIX TO WORK IN STATIC SIMULATION#
########################################

class AnimationStepController(Sofa.Core.Controller):
    def __init__(self, node, *args, **kwargs):
        Sofa.Core.Controller.__init__(self, *args, **kwargs)
        self.externalForce = [0, 30, 0]
        self.object_mass = 0.5
        self.createGraph(node)
        self.root = node
        self.save = True
        self.l2_error, self.MSE_error = [], []
        self.l2_deformation, self.MSE_deformation = [], []
        self.RMSE_error, self.RMSE_deformation = [], []

    def createGraph(self, rootNode):

        rootNode.addObject('RequiredPlugin', name='MultiThreading')
        rootNode.addObject('RequiredPlugin', name='Sofa.Component.Constraint.Projective') # Needed to use components [FixedProjectiveConstraint]
        rootNode.addObject('RequiredPlugin', name='Sofa.Component.Engine.Select') # Needed to use components [BoxROI]
        rootNode.addObject('RequiredPlugin', name='Sofa.Component.LinearSolver.Iterative') # Needed to use components [CGLinearSolver]
        rootNode.addObject('RequiredPlugin', name='Sofa.Component.LinearSolver.Direct')
        rootNode.addObject('RequiredPlugin', name='Sofa.Component.Mass')
        rootNode.addObject('RequiredPlugin', name='Sofa.Component.Mapping.Linear') # Needed to use components [BarycentricMapping]
        rootNode.addObject('RequiredPlugin', name='Sofa.Component.MechanicalLoad') # Needed to use components [ConstantForceField]
        rootNode.addObject('RequiredPlugin', name='Sofa.Component.ODESolver.Backward') # Needed to use components [StaticSolver]
        rootNode.addObject('RequiredPlugin', name='Sofa.Component.SolidMechanics.FEM.Elastic') # Needed to use components [TriangularFEMForceFieldOptim]
        rootNode.addObject('RequiredPlugin', name='Sofa.Component.StateContainer') # Needed to use components [MechanicalObject]
        rootNode.addObject('RequiredPlugin', name='Sofa.Component.Topology.Container.Dynamic') # Needed to use components [TriangleSetTopologyContainer]
        rootNode.addObject('RequiredPlugin', name='Sofa.Component.Topology.Container.Grid') # Needed to use components [RegularGridTopology]
        rootNode.addObject('RequiredPlugin', name='Sofa.Component.Visual') # Needed to use components [VisualStyle]

        rootNode.addObject('DefaultAnimationLoop')
        rootNode.addObject('DefaultVisualManagerLoop')
        rootNode.addObject('VisualStyle', name="visualStyle", displayFlags="showBehaviorModels showCollisionModels showForceFields")

        sphereRadius=0.001


        self.exactSolution = rootNode.addChild('HighResSolution2D', activated=True)
        self.exactSolution.addObject('MeshGmshLoader', name='grid', filename='mesh/zigzag_4445.msh')
        self.surface_topo = self.exactSolution.addObject('TriangleSetTopologyContainer', name='triangleTopo', src='@grid')
        self.MO1 = self.exactSolution.addObject('MechanicalObject', name='DOFs', template='Vec3d', src='@grid')
        # self.exactSolution.addObject('MeshMatrixMass', totalMass=10, name="SparseMass", topology="@quadTopo")
        self.exactSolution.addObject('StaticSolver', name='ODE', newton_iterations="20", printLog=False)
        self.exactSolution.addObject('CGLinearSolver', iterations=4500, name="linear solver", tolerance="1.0e-6", threshold="1.0e-6")
        self.exactSolution.addObject('TriangularFEMForceField', name="FEM", youngModulus=5000, poissonRatio=0.4, method="large")
        self.exactSolution.addObject('BoxROI', name='ROI', box=p_grid.fixed_box)
        self.exactSolution.addObject('FixedConstraint', indices='@ROI.indices')
        self.cff_box = self.exactSolution.addObject('BoxROI', name='ROI2', box="9.9 -1.1 -0.1 10.1 1.1 0.1")
        self.cff = self.exactSolution.addObject('ConstantForceField', indices="@ROI2.indices", totalForce=self.externalForce, showArrowSize=0.1, showColor="0.2 0.2 0.8 1")
        self.coarse = self.exactSolution.addChild('CoarseMesh')
        self.coarse.addObject('RegularGridTopology', name='coarseGrid', min=p_grid_LR.min, max=p_grid_LR.max, nx=p_grid_LR.res[0], ny=p_grid_LR.res[1], nz=p_grid_LR.res[2])
        self.coarse.addObject('TriangleSetTopologyContainer', name='triangleTopo', src='@coarseGrid')
        self.MO1_LR = self.coarse.addObject('MechanicalObject', name='coarseDOFs', template='Vec3d', src='@coarseGrid')
        self.coarse.addObject('SphereCollisionModel', radius=sphereRadius, group=1, color='0 1 0')
        self.coarse.addObject('BarycentricMapping', name="mapping", input='@../DOFs', input_topology='@../triangleTopo', output='@coarseDOFs', output_topology='@triangleTopo')


        self.exactSolution.addChild("visual")
        self.exactSolution.visual.addObject('OglModel', src='@../grid', color='0 1 1 0.5')
        self.exactSolution.visual.addObject('IdentityMapping', input='@../DOFs', output='@./')

        # same object with different resolution

        self.LowResSolution = rootNode.addChild('LowResSolution2D', activated=True)
        self.LowResSolution.addObject('MeshGmshLoader', name='grid', filename='mesh/zigzag_896.msh')
        self.surface_topo_LR = self.LowResSolution.addObject('TriangleSetTopologyContainer', name='quadTopo', src='@grid')
        self.MO2 = self.LowResSolution.addObject('MechanicalObject', name='DOFs', template='Vec3d', src='@grid')
        # self.LowResSolution.addObject('MeshMatrixMass', totalMass=10, name="SparseMass", topology="@quadTopo")
        self.LowResSolution.addObject('StaticSolver', name='ODE', newton_iterations="20", printLog=False)
        self.LowResSolution.addObject('CGLinearSolver', iterations=5000, name="linear solver", tolerance="1.0e-6", threshold="1.0e-6")
        self.LowResSolution.addObject('TriangularFEMForceField', name="FEM", youngModulus=5000, poissonRatio=0.4, method="large")
        self.LowResSolution.addObject('BoxROI', name='ROI', box=p_grid_LR.fixed_box)
        self.LowResSolution.addObject('FixedConstraint', indices='@ROI.indices')
        self.cff_box_LR = self.LowResSolution.addObject('BoxROI', name='ROI2', box="9.9 -1.1 -0.1 10.1 1.1 0.1")
        self.cffLR = self.LowResSolution.addObject('ConstantForceField', indices="@ROI2.indices", totalForce=self.externalForce, showArrowSize=0.1, showColor="0.2 0.2 0.8 1")

        self.trained_nodes = self.LowResSolution.addChild('CoarseMesh')
        self.trained_nodes.addObject('RegularGridTopology', name='coarseGrid', min=p_grid_LR.min, max=p_grid_LR.max, nx=p_grid_LR.res[0], ny=p_grid_LR.res[1], nz=p_grid_LR.res[2])
        self.trained_nodes.addObject('TriangleSetTopologyContainer', name='triangleTopo', src='@coarseGrid')
        self.MO_training = self.trained_nodes.addObject('MechanicalObject', name='coarseDOFs', template='Vec3d', src='@coarseGrid')
        self.trained_nodes.addObject('SphereCollisionModel', radius=sphereRadius, group=1, color='0 1 0')
        self.trained_nodes.addObject('BarycentricMapping', name="mapping", input='@../DOFs', input_topology='@../triangleTopo', output='@coarseDOFs', output_topology='@triangleTopo')

        self.LowResSolution.addChild("visual")
        self.LowResSolution.visual.addObject('OglModel', src='@../grid', color='1 0 0 0.2')
        self.LowResSolution.visual.addObject('IdentityMapping', input='@../DOFs', output='@./')

        self.nb_nodes = len(self.MO1.position.value)
        self.nb_nodes_LR = len(self.MO1_LR.position.value)


    def onSimulationInitDoneEvent(self, event):
        """
        Called within the Sofa pipeline at the end of the scene graph initialisation.
        """
        self.inputs = []
        self.outputs = []
        self.save = True
        self.efficient_sampling = False
        self.iteration = 0
        if self.efficient_sampling:
            self.count_v = 0
            self.num_versors = 5
            self.versors = self.generate_versors(self.num_versors)
            self.magnitudes = np.linspace(0, 40, 30)
            self.count_m = 0
            self.angles = np.linspace(0, 2*np.pi, self.num_versors, endpoint=False)
            self.starting_points = np.linspace(self.angles[0], self.angles[1], len(self.magnitudes), endpoint=False)
        if self.save:
            if not os.path.exists('npy_GNN_hf'):
                os.mkdir('npy_GNN_hf')
            # get current time from computer format yyyy-mm-dd-hh-mm-ss and create a folder with that name
            self.directory = datetime.datetime.now().strftime('%Y-%m-%d_%H:%M:%S')
            self.directory = self.directory + "_estimation_250_nodes"
            if self.efficient_sampling:
                self.directory = self.directory + "_efficient"
            os.makedirs(f'npy_GNN_hf/{self.directory}')
            print(f"Saving data to npy_GNN_hf/{self.directory}")
        self.sampled = False

        surface = self.surface_topo
        surface_LR = self.surface_topo_LR

        self.idx_surface = surface.triangles.value.reshape(-1)
        self.idx_surface_LR = surface_LR.triangles.value.reshape(-1)


    def onAnimateBeginEvent(self, event):

        self.bad_sample = False
        # reset positions
        self.MO1.position.value = self.MO1.rest_position.value
        self.MO2.position.value = self.MO2.rest_position.value
        if self.sampled:
            print("================== Sampled all magnitudes and versors ==================\n")
            print ("================== The simulation is over ==================\n")

        if not self.efficient_sampling:
            self.theta = np.random.uniform(0, 2*np.pi)
            self.versor = np.array([np.cos(self.theta), np.sin(self.theta)])
            self.versor = np.append(self.versor, 0)
            self.magnitude = np.random.uniform(0, 30)
            self.externalForce = np.append(self.magnitude * self.versor, 0)
        else:
            self.sample = self.count_m *self.num_versors + self.count_v
            self.externalForce = np.append(self.magnitudes[self.count_m] * self.versors[self.count_v], 0)

            self.count_v += 1
            if self.count_v == len(self.versors):
                self.count_v = 0
                self.count_m += 1
                self.versors = self.generate_versors(self.num_versors, starting_point=self.starting_points[self.count_m])
            if self.count_m == len(self.magnitudes):
                self.count_m = 0
                self.count_v = 0
                self.sampled = True

        x_min = 0.0
        x_max = 0.0
        y_min = 0.0
        y_max = 0.0
        z_min = -0.1
        z_max = 0.1

       # Define random box
        side = np.random.randint(1, 4)

        if side == 2:
            x_min = 9.99
            x_max = 10.01
            y_min = round(np.random.uniform(-1.0, 0.0), 2)
            y_max = y_min + 1
        elif side == 3:
            y_min = -1.01
            y_max = -0.29
            x_min = round(np.random.uniform(2.0, 9.0), 2)
            x_max = x_min + 1
        else:
            x_min = round(np.random.uniform(2.0, 9.0), 2)
            x_max = x_min + 1
            y_min = 0.29
            y_max = 1.01
        # Apply decay to magnitude based on x position
        def compute_force(x_pos, dir_vector, M0=1.0, alpha=0.3, gamma_x=0.7, gamma_y=0.1):
            """
            Compute the force vector with decay along the beam.

            Parameters:
                x_pos (float): Position along the beam (0 to 10 meters).
                dir_vector (tuple): Unit vector components (x, y, z) of the force direction.
                M0 (float): Initial force magnitude.
                alpha (float): Exponential decay rate.
                gamma_x (float): Horizontal force damping factor.
                gamma_y (float): Vertical force damping factor.

            Returns:
                np.ndarray: The force vector (Fx, Fy, Fz).
            """
            # Extract direction components
            dir_x, dir_y, dir_z = dir_vector

            # Ensure the direction vector is a unit vector
            magnitude = np.sqrt(dir_x**2 + dir_y**2)
            if magnitude == 0:
                raise ValueError("Direction vector cannot be zero.")
            dir_x, dir_y = dir_x / magnitude, dir_y / magnitude

            # Exponential decay
            exp_decay = M0 * np.exp(-alpha * x_pos)

            # Horizontal damping (based on x-direction), only if not at the end of the beam
            horizontal_damping = 0 if x_pos > 9.8 else gamma_x * abs(dir_x)

            # Vertical damping (based on y-direction)
            vertical_damping = gamma_y * abs(dir_y) * x_pos / 10

            # Combine the damping factors
            damping_factor = 1 - horizontal_damping - vertical_damping
            damping_factor = max(0, damping_factor)  # Ensure the damping factor is not negative

            # Compute the magnitude of the force
            force_magnitude = exp_decay * damping_factor

            # Compute the force vector
            force_vector = force_magnitude * np.array([dir_x, dir_y, 0])

            return force_magnitude

        max_magnitude = compute_force(x_min, self.versor, 40)
        self.magnitude = np.random.uniform(1, max_magnitude)

        self.externalForce = self.magnitude * self.versor


        # Set the new bounding box
        self.exactSolution.removeObject(self.cff_box)
        self.cff_box = self.exactSolution.addObject('BoxROI', name='ForceBox', drawBoxes=False, drawSize=1, box=[x_min, y_min, -0.1, x_max, y_max, 0.1])
        self.cff_box.init()

        self.LowResSolution.removeObject(self.cff_box_LR)
        self.cff_box_LR = self.LowResSolution.addObject('BoxROI', name='ForceBox', drawBoxes=True, drawSize=1, box=[x_min, y_min, -0.1, x_max, y_max, 0.1])
        self.cff_box_LR.init()

        # Get the intersection with the surface
        indices = list(self.cff_box.indices.value)
        indices = list(set(indices).intersection(set(self.idx_surface)))
        #print(f"Number of nodes in the high resolution solution: {len(indices)}")
        indices_LR = list(self.cff_box_LR.indices.value)
        indices_LR = list(set(indices_LR).intersection(set(self.idx_surface_LR)))
        #print(f"Number of nodes in the low resolution solution: {len(indices_LR)}")
        self.exactSolution.removeObject(self.cff)
        self.cff = self.exactSolution.addObject('ConstantForceField', indices=indices, totalForce=self.externalForce, showArrowSize=0.3, showColor="0.2 0.2 0.8 1")
        self.cff.init()

        indices_training = np.where((self.MO_training.rest_position.value[:, 0] >= x_min) & (self.MO_training.rest_position.value[:, 0] <= x_max) & (self.MO_training.rest_position.value[:, 1] >= y_min) & (self.MO_training.rest_position.value[:, 1] <= y_max) & (self.MO_training.rest_position.value[:, 2] >= z_min) & (self.MO_training.rest_position.value[:, 2] <= z_max))[0]

        #print(f"Number of nodes in the training set: {len(indices_training)}")

        self.LowResSolution.removeObject(self.cffLR)
        self.cffLR = self.LowResSolution.addObject('ConstantForceField', indices=indices_LR, totalForce=self.externalForce, showArrowSize=0.1, showColor="0.2 0.2 0.8 1")
        self.cffLR.init()

        #print(f"Bounding box: [{x_min}, {y_min}, {x_max}, {y_max}]")
        self.bounding_box = {"x_min": x_min, "x_max": x_max, "y_min": y_min, "y_max": y_max}
        self.versor_rounded = [round(i, 4) for i in self.versor]
        self.versor_rounded = list(self.versor_rounded)
        #self.versor_rounded.append(0)
        self.force_info = {"magnitude": round(self.magnitude, 4), "versor": self.versor_rounded}
        self.indices_BC = list(indices_training)
        for i in range(len(indices_training)):
            self.indices_BC[i] = int(indices_training[i])
        #print(f"Side: {side}")
        if indices_training.size == 0:
            print("Bad sample, no nodes in the bounding box")
            self.bad_sample = True
        self.start_time = process_time()


    def onAnimateEndEvent(self, event):
        self.end_time = process_time()
        #print("Computation time for 1 time step: ", self.end_time - self.start_time)
        #print("External force: ", np.linalg.norm(self.externalForce))
        U_high = self.compute_displacement(self.MO1_LR)
        # U_test = self.compute_displacement(self.MO1)
        U_low = self.compute_displacement(self.MO_training)
        # vel_high = self.compute_velocity(self.MO1_LR)
        # vel_low = self.compute_velocity(self.MO_training)
        # edges_high = self.compute_edges(self.surface_topo)
        edges_low = self.compute_edges(self.surface_topo_LR)

        if self.save and self.bad_sample == False:
            self.tmp_dir = f'npy_GNN_hf/{self.directory}/sample_{self.iteration}'
            if not os.path.exists(self.tmp_dir):
                os.makedirs(self.tmp_dir)
            else:
                print("Directory already exists, something went wrong")

            np.save(f'{self.tmp_dir}/high_res_displacement.npy', U_high)
            np.save(f'{self.tmp_dir}/low_res_displacement.npy', U_low)
            np.save(f'{self.tmp_dir}/edges_low.npy', edges_low)
            #save in a JSON file the bounding box and the force info with the structure Iteration -> Bounding box -> Force info and close the file
            with open(f'{self.tmp_dir}/info.json', 'w') as f:
                json.dump({'iteration': self.iteration, 'bounding_box': self.bounding_box, 'force_info': self.force_info, 'indices_BC': self.indices_BC}, f)


            #print(f"Saved data to {self.tmp_dir}")
            self.iteration += 1

    def compute_displacement(self, mechanical_object):
        # Compute the displacement between the high and low resolution solutions
        U = mechanical_object.position.value.copy() - mechanical_object.rest_position.value.copy()
        return U

    def compute_velocity(self, mechanical_object):
        # Compute the velocity of the high resolution solution
        return mechanical_object.velocity.value.copy()


    def compute_rest_position(self, mechanical_object):
        # Compute the position of the high resolution solution
        return mechanical_object.rest_position.value.copy()

    def compute_edges(self, grid):
        # create a matrix with the edges of the grid and their length
        edges = grid.edges.value.copy()
        positions = grid.position.value.copy()
        matrix = np.zeros((len(edges)*2, 3))
        for i, edge in enumerate(edges):
            # account for the fact the edges must be bidirectional
            matrix[len(edges) + i, 0] = edge[1]
            matrix[len(edges) + i, 1] = edge[0]
            matrix[len(edges) + i, 2] = np.linalg.norm(positions[edge[0]] - positions[edge[1]])
            matrix[i, 0] = edge[0]
            matrix[i, 1] = edge[1]
            matrix[i, 2] = np.linalg.norm(positions[edge[0]] - positions[edge[1]])
        return matrix

    def generate_versors(self, n_versors):
            # Initialize an empty list to store the versors
            a = 4*np.pi/n_versors
            d = np.sqrt(a)
            M_theta = int(np.round(np.pi/d))
            d_theta = np.pi/M_theta
            d_phi = a/d_theta
            versors = []
            for m in range(M_theta):
                theta = np.pi*(m + 0.5)/M_theta
                M_phi = int(np.round(2*np.pi*np.sin(theta)/d_phi))
                for n in range(M_phi):
                    phi = 2*np.pi*n/M_phi
                    versors.append([np.sin(theta)*np.cos(phi), np.sin(theta)*np.sin(phi), np.cos(theta)])
            return np.array(versors)

    def close(self):
        print("Closing simulation")


def createScene(rootNode, *args, **kwargs):
    rootNode.dt = 0.01
    rootNode.gravity = [0, 0, 0]
    rootNode.name = 'root'
    asc = AnimationStepController(rootNode, *args, **kwargs)
    rootNode.addObject(asc)
    return rootNode, asc


def main():
    import Sofa.Gui
    SofaRuntime.importPlugin("Sofa.GL.Component.Rendering3D")
    SofaRuntime.importPlugin("Sofa.GL.Component.Shader")
    SofaRuntime.importPlugin("Sofa.Component.StateContainer")
    SofaRuntime.importPlugin("Sofa.Component.ODESolver.Backward")
    SofaRuntime.importPlugin("Sofa.Component.LinearSolver.Direct")
    SofaRuntime.importPlugin("Sofa.Component.IO.Mesh")
    SofaRuntime.importPlugin("Sofa.Component.MechanicalLoad")
    SofaRuntime.importPlugin("Sofa.Component.Engine.Select")
    SofaRuntime.importPlugin("Sofa.Component.SolidMechanics.FEM.Elastic")


    USE_GUI = False

    root=Sofa.Core.Node("root")
    createScene(root)
    Sofa.Simulation.init(root)

    if not USE_GUI:
        for iteration in tqdm(range(500)):
            Sofa.Simulation.animate(root, root.dt.value)
    else:
        Sofa.Gui.GUIManager.Init("myscene", "qglviewer")
        Sofa.Gui.GUIManager.createGUI(root, __file__)
        Sofa.Gui.GUIManager.SetDimension(800, 600)
        Sofa.Gui.GUIManager.MainLoop(root)
        Sofa.Gui.GUIManager.closeGUI()


if __name__ == '__main__':
    from time import sleep
    from tqdm import tqdm
    # waiting_time = 21600
    # for i in tqdm(range(waiting_time)):
    #     sleep(1)
    main()
